#********************************************************************************#
# @Author : Ming Yang
# @Email  : ykevin09@gmail.com
# @Date   : 2021-02-19
# @Last Modified by     : Ming Yang
# @Lost Modified Time   : 2021-05-18
# @Function  : Undrained simple shear in bi-periodic cell via velocity control
#   1. Atoms divided into three groups: topLayer, midGroup, botLayer; probReg created
# for homogenization analysis (stress);
#   2. Shear is induced by topLayer gluded to top mesh-plate;
#   3. Can be monotonic or cyclic
# @Reference :
#********************************************************************************#
###Initialization
#preliminaries
units           si
atom_style      granular
atom_modify     map array
boundary        p p m
newton          off
communicate     single vel yes
#declare computation domain
read_restart    restart/consol_3_100kPa.equil
#neighbor listing
neighbor        0.0001 bin
neigh_modify    delay 0 #every 100

###Setup
#material and interaction properties required
variable 	    atomEY equal 7.0e10 #1GP=1e9Pa
variable 	    atomPO equal 0.25
variable 	    atomCOR equal 0.8
variable        atomCOF equal 0.5
variable        atomWallCOF equal 0.0
variable        atomCORF equal 0.1
variable        atomWallCORF equal 0.0
variable        atomCORVD equal 0.13
variable 	    atomRS equal 2.25
hard_particles  yes
fix             mEY all property/global youngsModulus peratomtype ${atomEY} ${atomEY}
fix             mPO all property/global poissonsRatio peratomtype ${atomPO} ${atomPO}
fix             mCOR all property/global coefficientRestitution peratomtypepair 2 ${atomCOR} ${atomCOR} ${atomCOR} ${atomCOR}
fix             mCOF all property/global coefficientFriction peratomtypepair 2 ${atomCOF} ${atomWallCOF} ${atomWallCOF} ${atomWallCOF}
fix             mCORF all property/global coefficientRollingFriction peratomtypepair 2 ${atomCORF} ${atomWallCORF} ${atomWallCORF} ${atomWallCORF}
fix             mCORVD all property/global coefficientRollingViscousDamping peratomtypepair 2 ${atomCORVD} ${atomCORVD} ${atomCORVD} ${atomCORVD}
fix             mRS all property/global rollingStiffness scalar ${atomRS}
#
#initial positions of servo walls
variable        sxlw17 equal -0.00024
variable        sylw18 equal -0.00024
variable        szlw19 equal -0.00024
variable        sxhw17 equal 0.01132
variable        syhw18 equal 0.01132
variable        szhw19 equal 0.01132
variable        sxaw17 equal 0.5*(${sxlw17}+${sxhw17})
variable        syaw18 equal 0.5*(${sylw18}+${syhw18})
variable        szaw19 equal 0.5*(${szlw19}+${szhw19})
variable        mslx0 equal ${sxhw17}-${sxlw17}
variable        msly0 equal ${syhw18}-${sylw18}
variable        mslz0 equal ${szhw19}-${szlw19}
#
variable        servoForce equal 0.001
variable        servoVmax equal 0.2
variable        servoKp equal 0.05
variable        servoKi equal 0.0
variable        servoKd equal 0.0
variable        servoRatio equal 0.01
variable        mslx1 equal ${sxhw17}-${sxlw17}
variable        msly1 equal ${syhw18}-${sylw18}
variable        mslz1 equal ${szhw19}-${szlw19}
variable        msltmp equal (${mslx1}>=${msly1})*${mslx1}+(${mslx1}<${msly1})*${msly1}
variable        msl2 equal (${msltmp}>=${mslz1})*${msltmp}+(${msltmp}<${mslz1})*${mslz1}
variable        servoScale equal 1.0*${msl2}/${mslx0}
#
fix             szlwall2 all mesh/surface/stress/servo file input/mesh/plane.stl type 2 scale ${servoScale} &
                    move ${sxaw17} ${syaw18} ${szlw19} com ${sxaw17} ${syaw18} ${szlw19} ctrlPV force axis 0 0 +1 &
                    target_val ${servoForce} vel_max ${servoVmax} kp ${servoKp} ki ${servoKi} kd ${servoKd}
fix             szhwall2 all mesh/surface/stress/servo file input/mesh/plane.stl type 2 scale ${servoScale} &
                    move ${sxaw17} ${syaw18} ${szhw19} com ${sxaw17} ${syaw18} ${szhw19} ctrlPV force axis 0 0 -1 &
                    target_val ${servoForce} vel_max ${servoVmax} kp ${servoKp} ki ${servoKi} kd ${servoKd}
fix             swalls2 all wall/gran model hertz tangential no_history mesh n_meshes 2 &
                    meshes szlwall2 szhwall2
#
variable        tmp equal f_szlwall2[9]
variable        szlw29 equal ${tmp}
variable        tmp equal f_szhwall2[9]
variable        szhw29 equal ${tmp}
#
unfix           swalls2
unfix           szlwall2
unfix           szhwall2
#
variable        xaw27 equal 0.5*(xlo+xhi)
variable        yaw28 equal 0.5*(ylo+yhi)
variable        mslx3 equal lx
variable        msly3 equal ly
variable        msl3 equal (${mslx3}>=${msly3})*${mslx3}+(${mslx3}<${msly3})*${msly3}
variable        SCALE3 equal 0.98*${msl3}/${mslx0}
#
fix             zlwall3 all mesh/surface/stress file input/mesh/plane.stl type 2 scale ${SCALE3} &
                    move ${xaw27} ${yaw28} ${szlw29} reference_point ${xaw27} ${yaw28} ${szlw29}
fix             zhwall3 all mesh/surface/stress file input/mesh/plane.stl type 2 scale ${SCALE3} &
                    move ${xaw27} ${yaw28} ${szhw29} reference_point ${xaw27} ${yaw28} ${szhw29}
fix             walls3 all wall/gran model hertz tangential history mesh n_meshes 2 &
                    meshes zlwall3 zhwall3
#
variable        tmp equal f_zlwall3[9]
variable        zl0w39 equal ${tmp}
variable        tmp equal f_zhwall3[7]
variable        xh0w37 equal ${tmp}
variable        tmp equal f_zhwall3[8]
variable        yh0w38 equal ${tmp}
variable        zhw39 equal f_zhwall3[9]
variable        zh0w39 equal ${zhw39}
variable        bvol equal lx*ly*(v_zh0w39-v_zl0w39) #Sample volume
#
#define the physics
pair_style      gran model hertz tangential history rolling_friction epsd3&
                    limitForce on torsionTorque on
pair_coeff      * *
#
variable        xl equal xlo
variable        xh equal xhi
variable        yl equal ylo
variable        yh equal yhi
variable        conRatio equal 0.05
variable        zTop equal (${zh0w39}-${conRatio}*(${zh0w39}-${zl0w39}))
region          regTop block ${xl} ${xh} ${yl} ${yh} ${zTop} ${zh0w39}
group           topLayer region regTop
variable        zBot equal (${zl0w39}+${conRatio}*(${zh0w39}-${zl0w39}))
region          regBot block ${xl} ${xh} ${yl} ${yh} ${zl0w39} ${zBot}
group           botLayer region regBot
group           atomAll type 1
group           midGroup subtract atomAll topLayer botLayer
#probReg
variable        probRatio equal 0.075
variable        probZt equal (${zh0w39}-${probRatio}*(${zh0w39}-${zl0w39}))
variable        probZb equal (${zl0w39}+${probRatio}*(${zh0w39}-${zl0w39}))
#
###Detailed settings
#integrator
fix             integr midGroup nve/sphere
#timestep
timestep        2.0e-9
fix             ctg all check/timestep/gran 1000 0.05 0.05
###Execution and further settings
variable        hstep equal 10000
variable        rstep equal 1000*${hstep}
#atom property and stress
compute         atomProp all property/atom mass diameter z vx vy vz fx fy fz tqx tqy tqz
compute         atomDmin all reduce min c_atomProp[2]
variable        aDmin equal c_atomDmin
variable        atomV atom c_atomProp[4]^2+c_atomProp[5]^2+c_atomProp[6]^2
compute         atomVmax all reduce max v_atomV
variable        aVmax equal sqrt(c_atomVmax)
variable        atomF atom c_atomProp[7]^2+c_atomProp[8]^2+c_atomProp[9]^2
compute         atomFmax all reduce max v_atomF
variable        aFmax equal sqrt(c_atomFmax)
variable        atomT atom c_atomProp[10]^2+c_atomProp[11]^2+c_atomProp[12]^2
compute         atomTmax all reduce max v_atomT
variable        aTmax equal sqrt(c_atomTmax)
variable        atomEk atom 0.5*c_atomProp[1]*(c_atomProp[4]^2+c_atomProp[5]^2+c_atomProp[6]^2)
compute         atomEkmax all reduce max v_atomEk
variable        aEkmax equal c_atomEkmax
#
#homogenization based on the whole volume
compute         atomStress all stress/atom virial
compute         bvolStress all reduce sum c_atomStress[1] c_atomStress[2] c_atomStress[3]&
                                          c_atomStress[4] c_atomStress[5] c_atomStress[6]
variable        pBvol equal -(c_bvolStress[1]+c_bvolStress[2]+c_bvolStress[3])/3/v_bvol
variable        sxxBvol equal -(c_bvolStress[1])/v_bvol
variable        syyBvol equal -(c_bvolStress[2])/v_bvol
variable        szzBvol equal -(c_bvolStress[3])/v_bvol
variable        sxyBvol equal (c_bvolStress[4])/v_bvol
variable        sxzBvol equal (c_bvolStress[5])/v_bvol
variable        syzBvol equal (c_bvolStress[6])/v_bvol
variable        volMass equal mass(atomAll)/2650.0
variable        eBvol equal (v_bvol-v_volMass)/v_volMass
#
#homogenization based on probReg: (false: 0 true: 1)
variable        probVol equal lx*ly*(v_probZt-v_probZb) #probReg volume
variable        conPi equal 4*PI/3
variable        atomR atom 0.5*c_atomProp[2]
variable        atomProbTop atom (c_atomProp[3]+v_atomR-v_probZt)
variable        atomProbBot atom (v_probZb-c_atomProp[3]+v_atomR)
variable        atomIsIn atom (v_atomProbTop<=0)&&(v_atomProbBot<=0)
variable        atomIsCrossTop atom (v_atomProbTop>0)&&(c_atomProp[3]-v_atomR-v_probZt<0)
variable        atomIsCrossBot atom (v_atomProbBot>0)&&(v_probZb-c_atomProp[3]-v_atomR<0)
variable        atomIsNot atom (c_atomProp[3]-v_atomR-v_probZt>=0)||(v_probZb-c_atomProp[3]-v_atomR>=0)
variable        atomProbVol atom v_conPi*v_atomIsIn*(v_atomR^3)+&
v_conPi*v_atomIsCrossTop*(v_atomR^3-1/4*v_atomProbTop^2*(3*v_atomR-v_atomProbTop))+&
v_conPi*v_atomIsCrossBot*(v_atomR^3-1/4*v_atomProbBot^2*(3*v_atomR-v_atomProbBot))+&
v_conPi*v_atomIsNot*0
variable        atomVol atom v_conPi*v_atomR*v_atomR*v_atomR
variable        atomProbSxx atom v_atomProbVol/v_atomVol*c_atomStress[1]
variable        atomProbSyy atom v_atomProbVol/v_atomVol*c_atomStress[2]
variable        atomProbSzz atom v_atomProbVol/v_atomVol*c_atomStress[3]
variable        atomProbSxy atom v_atomProbVol/v_atomVol*c_atomStress[4]
variable        atomProbSxz atom v_atomProbVol/v_atomVol*c_atomStress[5]
variable        atomProbSyz atom v_atomProbVol/v_atomVol*c_atomStress[6]
compute         probStress all reduce sum v_atomProbSxx v_atomProbSyy v_atomProbSzz&
                                          v_atomProbSxy v_atomProbSxz v_atomProbSyz
variable        pProb equal -(c_probStress[1]+c_probStress[2]+c_probStress[3])/3/v_probVol
variable        sxxProb equal -(c_probStress[1])/v_probVol
variable        syyProb equal -(c_probStress[2])/v_probVol
variable        szzProb equal -(c_probStress[3])/v_probVol
variable        sxyProb equal (c_probStress[4])/v_probVol
variable        sxzProb equal (c_probStress[5])/v_probVol
variable        syzProb equal (c_probStress[6])/v_probVol
compute         solidProbVol all reduce sum v_atomProbVol
variable        eProb equal (v_probVol-c_solidProbVol)/c_solidProbVol
#
#
compute         eng all ke
variable        oke equal c_eng
#
compute         topLayerVel topLayer reduce ave c_atomProp[4] c_atomProp[5] c_atomProp[6]
variable        topLayerVx equal c_topLayerVel[1]
#---- microscopic study ----
#coordination number (probReg, no volume-weighted)
compute         atomCN all contact/atom
variable        atomProbCN atom c_atomCN #c_atomCN*v_atomProbVol/v_atomVol # for N_c
variable        atomInProb atom (1-v_atomIsNot) #v_atomProbVol/v_atomVol # for N_p
variable        atomInProbCN0 atom (1-v_atomIsNot)*(v_atomProbCN==0) # for N_p^0
variable        atomInProbCN1 atom (1-v_atomIsNot)*(v_atomProbCN==1) # for N_p^1
variable        atomInProbCN2 atom (1-v_atomIsNot)*(v_atomProbCN==2) # for N_p^2
variable        atomInProbCN3 atom (1-v_atomIsNot)*(v_atomProbCN==3) # for N_p^3
variable        atomInProbCN4 atom (1-v_atomIsNot)*(v_atomProbCN==4) # for N_p^4
variable        atomInProbCN5 atom (1-v_atomIsNot)*(v_atomProbCN==5) # for N_p^5
variable        atomInProbCN6 atom (1-v_atomIsNot)*(v_atomProbCN==6) # for N_p^6
variable        atomInProbCN7 atom (1-v_atomIsNot)*(v_atomProbCN==7) # for N_p^7
variable        atomInProbCN8 atom (1-v_atomIsNot)*(v_atomProbCN==8) # for N_p^8
variable        atomInProbCN9 atom (1-v_atomIsNot)*(v_atomProbCN==9) # for N_p^9
variable        atomInProbCN10 atom (1-v_atomIsNot)*(v_atomProbCN==10) # for N_p^10
variable        atomInProbCN11 atom (1-v_atomIsNot)*(v_atomProbCN==11) # for N_p^11
variable        atomInProbCN12 atom (1-v_atomIsNot)*(v_atomProbCN==12) # for N_p^12
variable        atomInProbCN13 atom (1-v_atomIsNot)*(v_atomProbCN==13) # for N_p^13
variable        atomInProbCN14 atom (1-v_atomIsNot)*(v_atomProbCN==14) # for N_p^14
variable        atomInProbCN15 atom (1-v_atomIsNot)*(v_atomProbCN==15) # for N_p^15
variable        atomInProbCN16 atom (1-v_atomIsNot)*(v_atomProbCN==16) # for N_p^16
##(in case of volume-weighted computes)
# variable        atomInProbCN0 atom (1-v_atomIsNot)*(v_atomProbCN<=0) # for N_p^0
# variable        atomInProbCN1 atom (1-v_atomIsNot)*(v_atomProbCN<=1)*(v_atomProbCN>0) # for N_p^1
# variable        atomInProbCN2 atom (1-v_atomIsNot)*(v_atomProbCN<=2)*(v_atomProbCN>1) # for N_p^2
# variable        atomInProbCN3 atom (1-v_atomIsNot)*(v_atomProbCN<=3)*(v_atomProbCN>2) # for N_p^3
# variable        atomInProbCN4 atom (1-v_atomIsNot)*(v_atomProbCN<=4)*(v_atomProbCN>3) # for N_p^4
# variable        atomInProbCN5 atom (1-v_atomIsNot)*(v_atomProbCN<=5)*(v_atomProbCN>4) # for N_p^5
# variable        atomInProbCN6 atom (1-v_atomIsNot)*(v_atomProbCN<=6)*(v_atomProbCN>5) # for N_p^6
# variable        atomInProbCN7 atom (1-v_atomIsNot)*(v_atomProbCN<=7)*(v_atomProbCN>6) # for N_p^7
# variable        atomInProbCN8 atom (1-v_atomIsNot)*(v_atomProbCN<=8)*(v_atomProbCN>7) # for N_p^8
# variable        atomInProbCN9 atom (1-v_atomIsNot)*(v_atomProbCN<=9)*(v_atomProbCN>8) # for N_p^9
# variable        atomInProbCN10 atom (1-v_atomIsNot)*(v_atomProbCN<=10)*(v_atomProbCN>9) # for N_p^10
# variable        atomInProbCN11 atom (1-v_atomIsNot)*(v_atomProbCN<=11)*(v_atomProbCN>10) # for N_p^11
# variable        atomInProbCN12 atom (1-v_atomIsNot)*(v_atomProbCN<=12)*(v_atomProbCN>11) # for N_p^12
# variable        atomInProbCN13 atom (1-v_atomIsNot)*(v_atomProbCN<=13)*(v_atomProbCN>12) # for N_p^13
# variable        atomInProbCN14 atom (1-v_atomIsNot)*(v_atomProbCN<=14)*(v_atomProbCN>13) # for N_p^14
# variable        atomInProbCN15 atom (1-v_atomIsNot)*(v_atomProbCN<=15)*(v_atomProbCN>14) # for N_p^15
# variable        atomInProbCN16 atom (1-v_atomIsNot)*(v_atomProbCN<=16)*(v_atomProbCN>15) # for N_p^16
compute         tmpCN all reduce sum v_atomProbCN v_atomInProb&
                                     v_atomInProbCN0 v_atomInProbCN1 v_atomInProbCN2 v_atomInProbCN3&
                                     v_atomInProbCN4 v_atomInProbCN5 v_atomInProbCN6 v_atomInProbCN7&
                                     v_atomInProbCN8 v_atomInProbCN9 v_atomInProbCN10 v_atomInProbCN11&
                                     v_atomInProbCN12 v_atomInProbCN13 v_atomInProbCN14 v_atomInProbCN15&
                                     v_atomInProbCN16
variable        Nc equal c_tmpCN[1]
variable        Np equal c_tmpCN[2]
variable        Np0 equal c_tmpCN[3]
variable        Np1 equal c_tmpCN[4]
variable        Np2 equal c_tmpCN[5]
variable        Np3 equal c_tmpCN[6]
variable        Np4 equal c_tmpCN[7]
variable        Np5 equal c_tmpCN[8]
variable        Np6 equal c_tmpCN[9]
variable        Np7 equal c_tmpCN[10]
variable        Np8 equal c_tmpCN[11]
variable        Np9 equal c_tmpCN[12]
variable        Np10 equal c_tmpCN[13]
variable        Np11 equal c_tmpCN[14]
variable        Np12 equal c_tmpCN[15]
variable        Np13 equal c_tmpCN[16]
variable        Np14 equal c_tmpCN[17]
variable        Np15 equal c_tmpCN[18]
variable        Np16 equal c_tmpCN[19]
variable        CNa equal v_Nc/(v_Np+1e-6)
variable        CNg equal v_Nc/(v_Np-v_Np0+1e-6)
variable        CNm equal (v_Nc-v_Np1)/(v_Np-v_Np0-v_Np1+1e-6)
#
#fabric anisotropy: ac an at (contact-based)
# compute         tmpAAProp property/local
# compute         tmpAA pair/gran/local id force_normal
# compute         reduce sum
#
#fabric anisotropy: ac an at (atom-based)
#
#fabric anisotropy
#
#particle-particle and particle-wall contact info
#compute         pp all pair/gran/local pos id force force_normal force_tangential delta
#compute         pw all wall/gran/local pos id force force_normal force_tangential delta
#history
#dump            dpp all local ${hstep} output/4-shear/contact/ppcontact-*.dat &
#                    c_pp[1] c_pp[2] c_pp[3] &
#                    c_pp[4] c_pp[5] c_pp[6] c_pp[7] c_pp[8] c_pp[9] &
#                    c_pp[10] c_pp[11] c_pp[12] &
#                    c_pp[13] c_pp[14] c_pp[15] &
#                    c_pp[16] c_pp[17] c_pp[18] &
#                    c_pp[19]
#dump            dpw all local ${hstep} output/4-shear/contact/pwcontact-*.dat &
#                    c_pw[1] c_pw[2] c_pw[3] &
#                    c_pw[4] c_pw[5] c_pw[6] c_pw[7] c_pw[8] c_pw[9] &
#                    c_pw[10] c_pw[11] c_pw[12] &
#                    c_pw[13] c_pw[14] c_pw[15] &
#                    c_pw[16] c_pw[17] c_pw[18] &
#                    c_pw[19]
#
#state
variable        ostep equal step
#
variable        zhw3Sxz equal f_zhwall3[1]/(lx*ly)
variable        zhw3Syz equal f_zhwall3[2]/(lx*ly)
variable        zhw3Szz equal f_zhwall3[3]/(lx*ly)
variable        zlw3Sxz equal f_zlwall3[1]/(lx*ly)
variable        zlw3Syz equal f_zlwall3[2]/(lx*ly)
variable        zlw3Szz equal f_zlwall3[3]/(lx*ly)
variable        gxz equal (f_zhwall3[7]-${xh0w37})/(${zh0w39}-${zl0w39})/(1-2*${conRatio})
variable        gyz equal (f_zhwall3[8]-${yh0w38})/(${zh0w39}-${zl0w39})/(1-2*${conRatio})
variable        gzz equal (f_zhwall3[9]-${zh0w39})/(${zh0w39}-${zl0w39})/(1-2*${conRatio})
#
#variable for shear: quasi-static
variable        Imax equal 1.0e-3
variable        rho equal 2650.0
variable        dgam equal ${Imax}/v_aDmin*sqrt(v_pProb/${rho})
variable        vxMax equal v_dgam*(${zh0w39}-${zl0w39})*(1-2*${conRatio})
variable        dotGamma equal 1.0 # /s
variable        velx equal ${dotGamma}*(${zh0w39}-${zl0w39})*(1-2*${conRatio})
#
#practical equilibrium condition
variable        tolF1 equal v_pProb*v_aDmin*v_aDmin
variable        aFtol equal 1e-4*v_tolF1
variable        aTtol equal 1e-4*v_tolF1*v_aDmin
variable        aEktol equal 1e-8*v_tolF1*v_aDmin
variable        isEqForce equal v_aFmax<v_aFtol
variable        isEqTorque equal v_aTmax<v_aTtol
variable        isEqEk equal v_aEkmax<v_aEktol
variable        isEq equal v_isEqForce*v_isEqTorque*v_isEqEk
#variable for running
variable        tauAmp equal 2.0e4 # CSR=0.20
variable        totalStep equal 1.0/dt
variable        loopStep equal 1000
variable        loopCountMax equal floor(${totalStep}/${loopStep})
variable        loopCount loop ${loopCountMax}
#---- Output files ----
shell           mkdir output
shell           mkdir output/4-shear
shell           mkdir output/4-shear/visualization
#file 1: macro.txt
print           "N ke bvol eBvol eProb&
 xl yl zl xh yh zh&
 sxxProb syyProb szzProb sxyProb sxzProb syzProb&
 sxzTopWall syzTopWall szzTopWall sxyBotWall sxzBotWall syzBotWall&
 gxz gyz gzz" &
                    file output/4-shear/macro.txt screen no
fix             macroOutput all print ${hstep} &
                    "${ostep} ${oke} ${bvol} ${eBvol} ${eProb}&
 ${xl} ${yl} ${zl0w39} ${xh} ${yh} ${zhw39}&
 ${sxxProb} ${syyProb} ${szzProb} ${sxyProb} ${sxzProb} ${syzProb}&
 ${zhw3Sxz} ${zhw3Syz} ${zhw3Szz} ${zlw3Sxz} ${zlw3Syz} ${zlw3Szz}&
 ${gxz} ${gyz} ${gzz}" &
                    append output/4-shear/macro.txt screen no title none
#file 2: check.txt
print           "N aFmax aFtol aTmax aTtol aEkmax aEktol" &
                    file output/4-shear/check.txt screen no
fix             checkOutput all print ${hstep} &
                    "${ostep} ${aFmax} ${aFtol} ${aTmax} ${aTtol} ${aEkmax} ${aEktol}" &
                    append output/4-shear/check.txt screen no title none
#file 3: micro_contact.txt
print           "N Nc Np za zg zm Np0 Np1 Np2 Np3 Np4 Np5 Np6 Np7 Np8&
 Np9 Np10 Np11 Np12 Np13 Np14 Np15 Np16" &
                    file output/4-shear/micro_contact.txt screen no
fix             microContactOutput all print ${hstep} &
                    "${ostep} ${Nc} ${Np} ${CNa} ${CNg} ${CNm}&
 ${Np0} ${Np1} ${Np2} ${Np3} ${Np4} ${Np5} ${Np6} ${Np7} ${Np8} ${Np9} ${Np10}&
 ${Np11} ${Np12} ${Np13} ${Np14} ${Np15} ${Np16}" &
                    append output/4-shear/micro_contact.txt screen no title none
#
#visualization
dump            dmpMesh all mesh/vtk ${hstep} output/4-shear/visualization/wall-*.vtp stress wear
dump            dmp all custom/vtk ${hstep} output/4-shear/visualization/particle-*.vtp id type type &
                   x y z ix iy iz vx vy vz fx fy fz omegax omegay omegaz radius
#
#thermodynamic output settings
#
thermo_style    custom step v_oke v_eBvol v_eProb v_pProb v_gxz v_sxzProb &
                            v_velx v_vxMax v_CNg v_isEq
thermo          ${hstep}
thermo_modify   lost warn norm no
###Run
run 0
#
#file 1:
print           "${ostep} ${oke} ${bvol} ${eBvol} ${eProb}&
 ${xl} ${yl} ${zl0w39} ${xh} ${yh} ${zhw39}&
 ${sxxProb} ${syyProb} ${szzProb} ${sxyProb} ${sxzProb} ${syzProb}&
 ${zhw3Sxz} ${zhw3Syz} ${zhw3Szz} ${zlw3Sxz} ${zlw3Syz} ${zlw3Szz}&
 ${gxz} ${gyz} ${gzz}" &
                    append output/4-shear/macro.txt screen no
#file 2:
print           "${ostep} ${aFmax} ${aFtol} ${aTmax} ${aTtol} ${aEkmax} ${aEktol}" &
                    append output/4-shear/check.txt screen no
#file 3:
print           "${ostep} ${Nc} ${Np} ${CNa} ${CNg} ${CNm}&
 ${Np0} ${Np1} ${Np2} ${Np3} ${Np4} ${Np5} ${Np6} ${Np7} ${Np8} ${Np9} ${Np10}&
 ${Np11} ${Np12} ${Np13} ${Np14} ${Np15} ${Np16}" &
                    append output/4-shear/micro_contact.txt screen no
#
#---- Constant-volume monotonic simple shear -----
#variable        gamMax equal 0.50
#variable        totalStep equal ${gamMax}/${dotGamma}/dt
#fix             moveTopWall all move/mesh mesh zhwall3 linear ${velx} 0. 0.
#fix             moveTopLayer topLayer move linear ${velx} 0. 0.
#fix             moveBotWall all move/mesh mesh zlwall3 linear 0. 0. 0.
#fix             moveBotLayer botLayer move linear 0. 0. 0.
#print           "The total number of steps is ${totalStep}"
#restart         ${rstep} restart/restart_4m_*.equil
#run             ${totalStep}
#
#write_restart   restart/ussbp_mono.equil
#---- Constant-volume cyclic shear with stress amplitude ----
#
label           loop
if "(${velx} > 0) && (${sxzProb} > ${tauAmp})" then &
    "variable velx equal -${dotGamma}*(${zh0w39}-${zl0w39})*(1-2*${conRatio})"
if "(${velx} < 0) && (${sxzProb} < -${tauAmp})" then &
    "variable velx equal ${dotGamma}*(${zh0w39}-${zl0w39})*(1-2*${conRatio})"
fix             moveTopWall all move/mesh mesh zhwall3 linear ${velx} 0. 0.
fix             moveTopLayer topLayer move linear ${velx} 0. 0.
fix             moveBotWall all move/mesh mesh zlwall3 linear 0. 0. 0.
fix             moveBotLayer botLayer move linear 0. 0. 0.
restart         ${rstep} restart/restart_4c_*.equil
run             ${loopStep}
next            loopCount
jump            4-undrained_simple_shear_bp.lmp loop
#
write_restart   restart/ussbp_cyclic.equil
#End of script
